# Лабораторная работа №1 студент Якушика Павла
n := 15
x := 4
a := π/6
b := π
A := [1, 5, 4; 6, -3, 2; 8, 9, 9]
B := [-2, 2, 3; 1, 6, 4; 4, -4, -5]
V := [-8; 1; 7]
z := 4*sqrt(5 - 2*sqrt(6))/((nthroot(3, 4) + nthroot(2, 4)) + (nthroot(2, 4) - nthroot(3, 4)))
z = 0.534536
r := integral(cos(3*t)^3*3*t^2, t = a .. b)
r = -1.64714
p := (sqrt(x^3 + n) + cos(n*x - 1))/nthroot(x^5 + 8*x + n, 4)
p = 1.41891
C := A*B
C = [19, 16, 3; -7, -14, -4; 29, 34, 15]
x := -6, -5.8 .. 6
y := -6, -5.8 .. 6
f(x, y) := sin(x)/x - sin(y)/y
d := |A|*|B|
d = -1078
t := (sum(sin(i/n), i = 1 .. 10) + sum((i - n)/(i + n), i = 1 .. 5))/product((n + 3*i)/(n^2 + n*i - n), i = 1 .. 5)
t = 19375.2
s := CreateMesh(f, -6, 6, -6, 6, 60)
g := transpose(V)*A*V
g = -181
# [component: inputs s]
x := -2, -1.8 .. 2
S := B*V
S = [39; 26; -71]
y(x) := cos(3*x)^3*sqrt(9*x^2 + 1)
E := A^-1*C - B
E = [0, -8.88178e-16, 0; 8.88178e-16, 0, 0; 0, 1.77636e-15, 1.77636e-15]
q := max(A)
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y(x) = [5.3845; 1.40413; 0.00328455; -0.50875; -2.69444; -3.06829; -1.04249; -0.0241502; 0.0743203; 0.655634; 1; 0.655634; 0.0743203; -0.0241502; -1.04249; -3.06829; -2.69444; -0.50875; 0.00328455; 1.40413; 5.3845]
x = [-2; -1.8; -1.6; -1.4; -1.2; -1; -0.8; -0.6; -0.4; -0.2; 0; 0.2; 0.4; 0.6; 0.8; 1; 1.2; 1.4; 1.6; 1.8; 2]
p := min(B)
