limit(x*(sqrt(x^2 + 1) - x), x → ∞) → 1/2
j := 0.8, 0.82 .. 1
a := -1.17
F(j) := if(j < 0.85, sqrt(|a + j|), ln(j))
d/dx(cos(3*x)^3*ln(3*x^2 + sqrt(9*x^2 + 1))) → cos(3*x)^3*(6*x + 9*x/sqrt(9*x^2 + 1))/(3*x^2 + sqrt(9*x^2 + 1)) - 9*cos(3*x)^2*sin(3*x)*ln(3*x^2 + sqrt(9*x^2 + 1))
j = [0.8; 0.82; 0.84; 0.86; 0.88; 0.9; 0.92; 0.94; 0.96; 0.98; 1]
F(j) = [0.608276; 0.591608; 0.574456; -0.150823; -0.127833; -0.105361; -0.0833816; -0.0618754; -0.040822; -0.0202027; 0]
integral(cos(2*x)^2 + sin(2*x), x) → x/2 - cos(2*x)/2 + sin(4*x)/8
x := -5, -4.9 .. 5
f1(x) := sqrt(x)
f2(x) := e^x
f3(x) := ln(x)
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x^2*cos(2*x - 1) - 1 == 0
0
3*x + cos(x) + 1 == 0
0
x^4 + 3*x^3 - 23*x^2 - 55*x - 150 == 0
[5; -6; -1 + 2i; -1 - 2i]
