x := 2 .. 6
q(b) :=
    z ← sqrt(2*b + 2*sqrt(b^2 - 4))/sqrt(b^2 - 4 + b + 2)
    return z
q(x) = [1; 1.02333; 0.910684; 0.827327; 0.763441]
f(a) :=
    m ← 0
    for j ∈ 0.8, 0.82 .. 1
        q[m] ← sqrt(|a + j|) if j < 0.85
        q[m] ← ln(j) if j ≥ 0.85
        m ← m + 1
    return q
f(-1.17) = [0.608276; 0.591608; 0.574456; -0.150823; -0.127833; -0.105361; -0.0833816; -0.0618754; -0.040822; -0.0202027; 0]
s(x, t) :=
    s ← (ln(x)^3 + x^2)/sqrt(x + t) if (x < 0.5)
    s ← (ln(x)^3 + x^2)/sqrt(x + t) if (x < 0.5)
    s ← cos(x) + t*sin(x)^2 if x > 0.5
    return s
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x := 0.2, 0.4 .. 2
s(x, 2.2) = [-2.6652; -0.377876; 1.52674; 1.82883; 2.09806; 2.27349; 2.30641; 2.16892; 1.85923; 1.40286]
