6*x_1 - 9*x_2 + 5*x_3 + x_4 == 124
f(x) := x^2*cos(2*x - 1) - 1
x := 1
y := 1
Given
Q := Minerr(x, y)
x := -3, -2.9 .. 3
7*x_2 - 5*x_3 - x_4 == -54
2*y - sin(x - 0.5) == 1
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5*x_1 - 5*x_2 + 2*x_3 + 4*x_4 == 83
cos(y) + x == 1.5
x^4 + 3*x^3 - 23*x^2 - 55*x - 150
v := [-150; -55; -23; 3; 1]
3*x_1 - 9*x_2 + x_3 + 6*x_4 == 45
Q = [1; 1]
A := [6, -9, 5, 1; 0, 7, -5, -1; 5, -5, 2, 4; 3, -9, 1, 6]
polyroots(v) = [-6; -1 - 2i; -1 + 2i; 5]
B := [124; -54; 83; 45]
x := -2
root(f(x), x) = -1.98455
x := 3
root(f(x), x) = 2.91517
X := A^-1*B
x_1 := 1
x_2 := 1
x_3 := 1
x_4 := 1
X = [12; 1; 12; 1]
Given
x := -3, -2.9 .. 3
6*x_1 - 9*x_2 + 5*x_3 + x_4 == 124
f(x) := 3*x + cos(x) + 1
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7*x_2 - 5*x_3 - x_4 == -54
lsolve(A, B) = [12; 1; 12; 1]
5*x_1 - 5*x_2 + 2*x_3 + 4*x_4 == 83
3*x_1 - 9*x_2 + x_3 + 6*x_4 == 45
V := Find(x_1, x_2, x_3, x_4)
V = [12; 1; 12; 1]
x := -1
root(f(x), x) = -0.607102
